/FILNAM,truss
/title, Simple Truss
/prep7
n, 1, 25.0,  0.0, 0.0    ! Node 1 is located at (25.0, 0.0, 0.0)
n, 2,  0.0, 18.0, 0.0
n, 3,  0.0,  0.0, 0.0
et, 1, link180             ! Element type; no.1 is link180
sectype, 1, link           ! Type of cross section is link
secdata, 0.5               ! Cross sectional area = 0.5 sq in
mp, ex, 1, 3.e7          ! Material Properties, E for material no. 1
mp, prxy, 1, 0.3         ! & poisson's ratio for material no.1
en, 1, 3, 1              ! Element Number 1 connects nodes 3 & 1
en, 2, 2, 1
d, 3, ux, 0.             ! Displacement at node 3 in x-dir is zero
d, 3, uy, 0.             ! Displacement at node 3 in y-dir is zero
d, 2, ux, 0.
d, 2, uy, 0.
f, 1, fy, -1000.         ! Force at node 1 in y-direction is -1000.
finish
/solu                    ! Select static load solution
antype, static
solve
save
finish
/post1                   ! Use 'ssum' to compute sums interactively
etable, Stress, ls, 1    ! Create a table of element stress values
etable, Volume, volum    ! Create a table of element volumes
